# NTC温度计算插值表
# NTC型号： -
# R25： 10K
# Beta： 3950
R_25 := 10000
T_N := 298.15
β := 3950
# 上拉电阻： | 下拉电阻： | 插值总数：
R_PU := 10000
R_PD := 0
p := 256
# ADC分辨率：
i := 1 .. p - 1
n := 8
k_AD[i] := 1/p*i
R_T[i] := (k_AD[i]*(R_PU + R_PD) - R_PD)/(1 - k_AD[i])
T[i] := round((β*T_N/(β + ln(R_T[i]/R_25)*T_N) - 273.15)*10)
# ADC采样原始值（8位）：
V_ADC[i] := 2^n/p*i
T = [
    0; 2394; 1969; 1750; 1607; 1501; 1418; 1350; 1293; 1244
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]
a := WRITETEXT("a.txt", T)
# [plot: T/10 vs V_ADC]
